*Heading
 modified cylindrical-conical hybrid heat source
** Job name: Gaussian_HSM_3D Model name: Laser_Welding
** Generated by: Abaqus/CAE 2024
*Preprint, echo=NO, model=NO, history=NO, contact=NO
**
** PARTS
**
*Part, name=Part-1
*End Part
**
**
** ASSEMBLY
**
*Assembly, name=Assembly
**
*Instance, name=Part-1-1, part=Part-1
       -0.03,      -0.0015,           0.
*Node
      1, 0.0234999992,           0.,           0.
      2, 0.0234999992,           0., 0.0299999993
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*Element, type=C3D8T
   1,  344, 3325, 5143, 3233,    1,   13,  519,  176
   2, 3325, 3326, 5144, 5143,   13,   14,  520,  519
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*Nset, nset=Set-1, generate
    1,  9272,     1
*Elset, elset=Set-1, generate
    1,  6660,     1
** Section: ss
*Solid Section, elset=Set-1, material=SS304
,
*End Instance
**
*Instance, name=Part-1-2, part=Part-1
          0.,      -0.0015,           0.
*Node
      1, 0.00650000013,           0.,           0.
      2, 0.00650000013,           0., 0.0299999993
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*Element, type=C3D8T
   1,  300, 1983, 5143, 1935,    1,   13,  519,  154
   2, 1983, 1984, 5144, 5143,   13,   14,  520,  519
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*Nset, nset=Set-1, generate
    1,  9272,     1
*Elset, elset=Set-1, generate
    1,  6660,     1
** Section: ss
*Solid Section, elset=Set-1, material=SS304
,
*End Instance
**
*Nset, nset=Set-4, instance=Part-1-1
    1,    2,    5,    8,    9,   10
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*Nset, nset=Set-4, instance=Part-1-2
    1,    2,    3,    4,    5,    6
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*Elset, elset=Set-4, instance=Part-1-1, generate
 4321,  6660,     1
*Elset, elset=Set-4, instance=Part-1-2, generate
    1,  2340,     1
*Nset, nset=Set-5, instance=Part-1-1
    3,    4,    6,    7,   95,   96
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*Nset, nset=Set-5, instance=Part-1-2
    9,   10,   11,   12,  305,  306
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*Elset, elset=Set-5, instance=Part-1-1
 1381, 1382, 1383, 1384, 1385, 1386
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*Elset, elset=Set-5, instance=Part-1-2, generate
 2341,  2520,     1
*Nset, nset=Set-6, instance=Part-1-1, generate
    1,  9272,     1
*Nset, nset=Set-6, instance=Part-1-2, generate
    1,  9272,     1
*Elset, elset=Set-6, instance=Part-1-1, generate
    1,  6660,     1
*Elset, elset=Set-6, instance=Part-1-2, generate
    1,  6660,     1
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*Elset, elset=_CP-1-Part-1-1_S2, internal, instance=Part-1-1, generate
 4321,  4500,     1
*Surface, type=ELEMENT, name=CP-1-Part-1-1
_CP-1-Part-1-1_S2, S2
*Elset, elset=_CP-1-Part-1-2_S5, internal, instance=Part-1-2
  721,  722,  723,  724,  725,  726
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*Surface, type=ELEMENT, name=CP-1-Part-1-2
_CP-1-Part-1-2_S5, S5
*Elset, elset=_Surf-1_S6, internal, instance=Part-1-1, generate
 4321,  6658,     3
*Elset, elset=_Surf-1_S6, internal, instance=Part-1-2, generate
 2341,  6658,     3
*Elset, elset=_Surf-1_S2, internal, instance=Part-1-1, generate
    1,  1440,     1
*Elset, elset=_Surf-1_S2, internal, instance=Part-1-2, generate
   1,  780,    1
*Elset, elset=_Surf-1_S1, internal, instance=Part-1-1, generate
 2881,  4320,     1
*Elset, elset=_Surf-1_S1, internal, instance=Part-1-2, generate
 1561,  2340,     1
*Elset, elset=_Surf-1_S4, internal, instance=Part-1-1, generate
 4323,  6660,     3
*Elset, elset=_Surf-1_S4, internal, instance=Part-1-2, generate
 2343,  6660,     3
*Surface, type=ELEMENT, name=Surf-1
_Surf-1_S6, S6
_Surf-1_S2, S2
_Surf-1_S4, S4
_Surf-1_S1, S1
*Elset, elset=_Surf-2_S6, internal, instance=Part-1-1, generate
 4321,  6658,     3
*Elset, elset=_Surf-2_S6, internal, instance=Part-1-2, generate
 2341,  6658,     3
*Elset, elset=_Surf-2_S2, internal, instance=Part-1-1, generate
    1,  1440,     1
*Elset, elset=_Surf-2_S2, internal, instance=Part-1-2, generate
   1,  780,    1
*Elset, elset=_Surf-2_S1, internal, instance=Part-1-1, generate
 2881,  4320,     1
*Elset, elset=_Surf-2_S1, internal, instance=Part-1-2, generate
 1561,  2340,     1
*Elset, elset=_Surf-2_S4, internal, instance=Part-1-1, generate
 4323,  6660,     3
*Elset, elset=_Surf-2_S4, internal, instance=Part-1-2, generate
 2343,  6660,     3
*Surface, type=ELEMENT, name=Surf-2
_Surf-2_S6, S6
_Surf-2_S2, S2
_Surf-2_S4, S4
_Surf-2_S1, S1
** Constraint: CP-1-Part-1-2-Part-1-1
*Tie, name=CP-1-Part-1-2-Part-1-1, adjust=yes, type=SURFACE TO SURFACE
CP-1-Part-1-1, CP-1-Part-1-2
*End Assembly
**
** MATERIALS
**
** Stainless Steel 304 Grade
*Material, name=SS304
*Conductivity
 14.6,   0.
 15.1, 100.
 16.1, 200.
  18., 400.
 20.8, 600.
 23.9, 800.
  28.,1000.
 33.7,1300.
  39.,1400.
  70.,1500.
 100.,2000.
*Density
7900.,   0.
7850., 100.
7800., 200.
7790., 400.
7780., 600.
7750., 800.
7700.,1000.
7680.,1200.
7670.,1300.
7650.,1400.
7645.,1500.
*Elastic
 1.98e+11, 0.294,    0.
 1.93e+11, 0.295,  100.
 1.85e+11, 0.301,  200.
 1.67e+11, 0.318,  400.
 1.59e+11, 0.326,  600.
  1.5e+11,  0.33,  700.
 1.51e+11, 0.333,  800.
    1e+11, 0.336, 1000.
    6e+10, 0.339, 1200.
  1.5e+10,  0.36, 1400.
    1e+10, 0.388, 1500.
*Expansion
  1.1e-05,   0.
 1.15e-05, 100.
 1.25e-05, 200.
  1.4e-05, 400.
  1.6e-05, 600.
  1.7e-05, 800.
  1.7e-05,1000.
  1.7e-05,1200.
  1.7e-05,1400.
  1.7e-05,1500.
*Latent Heat
270000.,1400.,1454.
*Plastic
 4.56e+08,   0.,   0.
 3.18e+08,   0., 100.
 2.86e+08,   0., 200.
 1.55e+08,   0., 400.
 1.49e+08,   0., 600.
  9.1e+07,   0., 800.
  5.5e+07,   0.,1000.
  2.5e+07,   0.,1200.
  1.5e+07,   0.,1400.
    1e+07,   0.,1500.
*Specific Heat
 462.,   0.
 496., 100.
 512., 200.
 600., 400.
 800., 600.
1200., 800.
 850.,1000.
 800.,1200.
1000.,1400.
1200.,1450.
1000.,1500.
**
** PHYSICAL CONSTANTS
**
*Physical Constants, absolute zero=-273.15, stefan boltzmann=5.669e-08
**
** BOUNDARY CONDITIONS
**
** Name: BC-1 Type: Displacement/Rotation
*Boundary
Set-5, 1, 1
Set-5, 2, 2
Set-5, 3, 3
**
** PREDEFINED FIELDS
**
** Name: Predefined Field-1   Type: Temperature
*Initial Conditions, type=TEMPERATURE
Set-6, 25.
** ----------------------------------------------------------------
**
** STEP: Welding
**
*Step, name=Welding, nlgeom=YES, inc=1000
*Coupled Temperature-displacement, creep=none, deltmx=5000.
0.01, 1., 1e-07, 0.5
**
** LOADS
**
** Name: Load-1   Type: Body heat flux
*Dflux
Set-4, BFNU, 1.
**
** INTERACTIONS
**
** Interaction: Int-1
*Sfilm
Surf-1, F, 25., 15.
** Interaction: Int-2
*Sradiate
Surf-2, R, 25., 0.6
**
** OUTPUT REQUESTS
**
*Restart, write, frequency=0
**
** FIELD OUTPUT: F-Output-1
**
*Output, field, variable=PRESELECT, frequency=5
**
** HISTORY OUTPUT: H-Output-1
**
*Output, history, variable=PRESELECT
*End Step
** ----------------------------------------------------------------
**
** STEP: Cooling
**
*Step, name=Cooling, nlgeom=YES, inc=1000
*Coupled Temperature-displacement, creep=none, deltmx=5000.
0.1, 600., 1e-07, 60.
**
** LOADS
**
** Name: Load-1   Type: Body heat flux
*Dflux, op=NEW
**
** OUTPUT REQUESTS
**
*Restart, write, frequency=0
**
** FIELD OUTPUT: F-Output-1
**
*Output, field, variable=PRESELECT, frequency=5
**
** HISTORY OUTPUT: H-Output-1
**
*Output, history, variable=PRESELECT
*End Step
